// COMSOL Multiphysics 5.2.0.166 model "laplace-stripline.mph"
// Outline of the model tree

Geometry
  geom1 "Geometry 1" (2D, length unit mm)
    r1: Rectangle | base = center; size = {100, 100}
    r2: Rectangle | base = center; size = {50, 1}
    r3: Rectangle | pos = {0, 5}; base = center; size = {10, 1}
    fil1: Fillet | point = r3(1) entities 1-4; radius = 0.2
    r4: Rectangle (disabled) | pos = {0, 8}; base = center; size = {10, 1}
    fil2: Fillet (disabled) | point = r4(1) entities 1-4; radius = 0.2
      prob1: GeomError "Error 1"
        error: GeomError | details = Property: point
    r5: Rectangle | pos = {0, 10}; base = center; size = {50, 1}
    fin: Finalize "Form Union"

Physics
  lpeq: LaplaceEquation on domains 1
    dependent variable u
    leq1: LaplaceEquation (default)
    zflx1: ZeroFluxBoundary "Zero Flux 1" (default)
    init1: init "Initial Values 1" (default)
    dir1: DirichletBoundary "Dirichlet Boundary Condition 1" on boundaries 10-13, 17-20 | r = 1
    dir2: DirichletBoundary "Dirichlet Boundary Condition 2" (disabled) on no boundaries | r = -0.5
    dir3: DirichletBoundary "Dirichlet Boundary Condition 3" on boundaries 4-9, 14, 15 | r = 0

Mesh
  mesh1 "Mesh 1"
    size: MeshSizeDefault | hauto = 3
    edg1: Edge on boundaries 10-13, 17-20
      size1: Size on boundaries 10-13, 17-20 | hmax = 0.5; hauto = 5; custom = on
    ftri1: FreeTri "Free Triangular 1" on remaining entities

Studies
  std1 "Study 1"
    stat: Stationary

Solver configurations
  sol1 "Solution 1" (study std1)
    v1: Variables "Dependent Variables 1"
    s1: Stationary "Stationary Solver 1"
      dDef: Direct
      fc1: FullyCoupled | linsolver = dDef

Datasets
  dset1: Solution | solution = sol1

Tables
  tbl1: Table
    // Line Integration 1 (u)
    Dependent variable u (mm) | uy*x+ux*y (mm) | uy*x+ux*y (mm)
    0 | 0.0030419 | 0.0030419

Plots
  pg1: PlotGroup2D "2D Plot Group 1" | data = dset1
    surf1: Surface | expr = sqrt(uy^2+ux^2)
    str1: Streamline (disabled) | expr = {ux, uy}; madv = manual; minitref = 20; mseed = {5, 3.5}
    str2: Streamline (disabled) | expr = {uy, -ux}; madv = manual; mseed = {0, 3}
    con1: Contour | expr = u
    arws1: ArrowSurface (disabled) | expr = {ux, uy}; xnumber = 50; ynumber = 50; arrowlength = logarithmic

Exports
  img1: Image2D "2D Image 1"
    size = manualprint
    weblockratio = off
    webwidth = 800
    webheight = 600
    webresolution = 96
    printlockratio = off
    printwidth = 120
    printheight = 90
    printresolution = 300
    pngfilename = stripline.png
    options = off
    axes = on